** ***************************************************************************
**   Written by : Femap
**   Version    : 2020.2.2
**   From Model : F:\active\7v\b01\assets\mesh_小MG2_t172um.modfem
**   Date       : Tue Jan 27 14:13:29 2026
** ***************************************************************************
**
*HEADING
ABAQUS 静解析 解析セット
*NODE, NSET=GLOBAL
   90404,       1.379,       0.976,          0.
   91475,   1.3852266,       1.148,  -0.1785714
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*ELEMENT, TYPE=C3D8, ELSET=Pwire
 303754, 268408, 268409, 268455, 268454, 267812, 267813, 267859, 267858
 303755, 268409, 268410, 268456, 268455, 267813, 267814, 267860, 267859
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*ELEMENT, TYPE=S4, ELSET=Pプレート_プロパティ
 411272, 131130, 130633, 130634, 131131
 411273, 131131, 130634, 130635, 131132
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*ELEMENT, TYPE=C3D8, ELSET=Pcover
 534050, 451939, 452207, 449937, 449936,  91608, 131183, 130686,  91475
 534051, 452207, 452208, 449938, 449937, 131183, 131184, 130687, 130686
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** Femap Group 1 : zmax
*NSET, NSET=Gzmax, GENERATE
90404,90404,1
128483,128483,1
261229,261231,1
261241,261242,1
267812,268400,1
** Femap Group 2 : zmin
*NSET, NSET=Gzmin, GENERATE
109430,109431,1
109521,109522,1
197728,197773,1
198064,198086,1
198092,198114,1
309525,310120,1
370510,370543,1
449719,449760,1
450163,450204,1
450607,450648,1
451051,451092,1
451495,451536,1
** Femap Group 3 : xmin
*NSET, NSET=Gxmin
130633,130731,131130,131228,131627,131725
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** Femap Group 4 : ymin
*NSET, NSET=Gymin
130991,130997,131488,131494,131985,131991
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*ELSET, ELSET=OUT_PLT, GENERATE
411272,423016,1
507896,519640,1
*ELSET, ELSET=OUT_CONT, GENERATE
303754,342323,1
534050,604519,1
** Femap Property 1 : wire
*ORIENTATION, NAME=S0, DEFINITION=COORDINATES, SYSTEM=RECTANGULAR
        1.,        0.,        0.,        0.,        1.,        0.
*SOLID SECTION, ELSET=Pwire, MATERIAL=M等方性_マテリアル, ORIENTATION=S0
** Femap Property 2 : プレート プロパティ
*SHELL SECTION, ELSET=Pプレート_プロパティ, MATERIAL=M等方性_マテリアル
        0.,
** Femap Property 3 : cover
*SOLID SECTION, ELSET=Pcover, MATERIAL=M等方性_マテリアル, ORIENTATION=S0
** Femap Material 1 : 等方性 マテリアル
*MATERIAL, NAME=M等方性_マテリアル
*ELASTIC, TYPE=ISOTROPIC
        0.,        0.,        0.
** Load Step 1 -------------------------------------------------------
*STEP, INC=100
無題
*STATIC

*NODE PRINT, FREQUENCY=1
    U,
*FILE FORMAT, ASCII
*NODE FILE, FREQUENCY=1
    U,
*NODE FILE, FREQUENCY=1
   CF,
*NODE FILE, FREQUENCY=1
   RF,
*EL PRINT, ELSET=OUT_PLT,FREQUENCY=1, POSITION=CENTROIDAL
    S,
 SINV,
*EL PRINT, ELSET=OUT_PLT,FREQUENCY=1,	POSITION=NODES
    S,
 SINV,
*EL PRINT, ELSET=OUT_CONT,FREQUENCY=1, POSITION=CENTROIDAL
    S,
 SINV,
*EL PRINT, ELSET=OUT_CONT,FREQUENCY=1,	POSITION=NODES
    S,
 SINV,
*EL FILE, ELSET=OUT_PLT,FREQUENCY=1, POSITION=CENTROIDAL
    S,
 SINV,
*EL FILE, ELSET=OUT_PLT,FREQUENCY=1,	POSITION=NODES
    S,
 SINV,
*EL FILE, ELSET=OUT_CONT,FREQUENCY=1, POSITION=CENTROIDAL
    S,
 SINV,
*EL FILE, ELSET=OUT_CONT,FREQUENCY=1,	POSITION=NODES
    S,
 SINV,
*EL PRINT, ELSET=OUT_PLT,FREQUENCY=1, POSITION=CENTROIDAL
   SF,
*EL PRINT, ELSET=OUT_PLT,FREQUENCY=1,	POSITION=NODES
   SF,
*EL PRINT, ELSET=OUT_CONT,FREQUENCY=1, POSITION=CENTROIDAL
*EL PRINT, ELSET=OUT_CONT,FREQUENCY=1,	POSITION=NODES
*EL FILE, ELSET=OUT_PLT,FREQUENCY=1, POSITION=CENTROIDAL
   SF,
*EL FILE, ELSET=OUT_PLT,FREQUENCY=1,	POSITION=NODES
   SF,
*EL FILE, ELSET=OUT_CONT,FREQUENCY=1, POSITION=CENTROIDAL
*EL FILE, ELSET=OUT_CONT,FREQUENCY=1,	POSITION=NODES
*END STEP
