** ***************************************************************************
**   Written by : Femap
**   Version    : 2020.2.2
**   From Model : F:\active\7v\b01\assets\mesh_test.modfem
**   Date       : Fri Jan 30 11:06:31 2026
** ***************************************************************************
**
*HEADING
ABAQUS 静解析 解析セット
*NODE, NSET=GLOBAL
       1,          0.,          0.,          0.
       2,          0.,   0.3333333,          0.
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*ELEMENT, TYPE=C3D8, ELSET=Pwire
     10,     17,     18,     29,     28,      1,      2,     13,     12
     11,     18,     19,     30,     29,      2,      3,     14,     13
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*ELEMENT, TYPE=C3D8, ELSET=Pcover
    430,    509,    510,    506,    505,    593,    594,    590,    589
    431,    510,    511,    507,    506,    594,    595,    591,    590
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** Femap Group 1 : zmax
*NSET, NSET=Gzmax
321,322,323,324,325,326
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** Femap Group 2 : zmin
*NSET, NSET=Gzmin
1,2,3,4,5,6,7,8,9,10
11,12,13,14,15,16
** Femap Group 3 : xmin
*NSET, NSET=Gxmin
1,2,3,4,17,18
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** Femap Group 4 : ymin
*NSET, NSET=Gymin
1,10,11,12,17,26
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** Femap Group 5 : coh_cover
*ELSET, ELSET=Gcoh_cover, GENERATE
430,450,1
** Femap Group 6 : coh_wire
*ELSET, ELSET=Gcoh_wire
12,15,18,21,24,27
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*ELSET, ELSET=OUT_CONT, GENERATE
10,189,1
430,549,1
** Femap Property 1 : wire
*ORIENTATION, NAME=S0, DEFINITION=COORDINATES, SYSTEM=RECTANGULAR
        1.,        0.,        0.,        0.,        1.,        0.
*SOLID SECTION, ELSET=Pwire, MATERIAL=Ma, ORIENTATION=S0
** Femap Property 2 : cover
*SOLID SECTION, ELSET=Pcover, MATERIAL=Ma, ORIENTATION=S0
** Femap Material 1 : a
*MATERIAL, NAME=Ma
*ELASTIC, TYPE=ISOTROPIC
        0.,        0.,        0.
** Load Step 1 -------------------------------------------------------
*STEP, INC=100
無題
*STATIC

*NODE PRINT, FREQUENCY=1
    U,
*FILE FORMAT, ASCII
*NODE FILE, FREQUENCY=1
    U,
*NODE FILE, FREQUENCY=1
   CF,
*NODE FILE, FREQUENCY=1
   RF,
*EL PRINT, ELSET=OUT_CONT,FREQUENCY=1, POSITION=CENTROIDAL
    S,
 SINV,
*EL PRINT, ELSET=OUT_CONT,FREQUENCY=1,	POSITION=NODES
    S,
 SINV,
*EL FILE, ELSET=OUT_CONT,FREQUENCY=1, POSITION=CENTROIDAL
    S,
 SINV,
*EL FILE, ELSET=OUT_CONT,FREQUENCY=1,	POSITION=NODES
    S,
 SINV,
*EL PRINT, ELSET=OUT_CONT,FREQUENCY=1, POSITION=CENTROIDAL
*EL PRINT, ELSET=OUT_CONT,FREQUENCY=1,	POSITION=NODES
*EL FILE, ELSET=OUT_CONT,FREQUENCY=1, POSITION=CENTROIDAL
*EL FILE, ELSET=OUT_CONT,FREQUENCY=1,	POSITION=NODES
*END STEP
