** ***************************************************************************
**   Written by : Femap
**   Version    : 2020.2.2
**   From Model : F:\active\7v\b01\assets\mesh_test.v3.modfem
**   Date       : Fri Jan 30 11:33:43 2026
** ***************************************************************************
**
*HEADING
ABAQUS ÃðÍ ðÍZbg
*NODE, NSET=GLOBAL
       1,          0.,          0.,          0.
       2,          0.,   0.3333333,          0.
       3,          0.,   0.6666667,          0.
       4,          0.,          1.,          0.
       5,   0.3333333,          1.,          0.
       6,   0.6666667,          1.,          0.
       7,          1.,          1.,          0.
       8,          1.,   0.6666667,          0.
       9,          1.,   0.3333333,          0.
      10,          1.,          0.,          0.
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*ELEMENT, TYPE=C3D8, ELSET=Pwire
     10,     17,     18,     29,     28,      1,      2,     13,     12
     11,     18,     19,     30,     29,      2,      3,     14,     13
*ELEMENT, TYPE=C3D8, ELSET=Pwire_coh
     12,     19,     20,     21,     30,      3,      4,      5,     14
*ELEMENT, TYPE=C3D8, ELSET=Pwire
     13,     28,     29,     31,     27,     12,     13,     15,     11
     14,     29,     30,     32,     31,     13,     14,     16,     15
*ELEMENT, TYPE=C3D8, ELSET=Pwire_coh
     15,     30,     21,     22,     32,     14,      5,      6,     16
*ELEMENT, TYPE=C3D8, ELSET=Pwire
     16,     27,     31,     25,     26,     11,     15,      9,     10
     17,     31,     32,     24,     25,     15,     16,      8,      9
*ELEMENT, TYPE=C3D8, ELSET=Pwire_coh
     18,     32,     22,     23,     24,     16,      6,      7,      8
*ELEMENT, TYPE=C3D8, ELSET=Pwire
     19,     33,     34,     45,     44,     17,     18,     29,     28
     20,     34,     35,     46,     45,     18,     19,     30,     29
*ELEMENT, TYPE=C3D8, ELSET=Pwire_coh
     21,     35,     36,     37,     46,     19,     20,     21,     30
*ELEMENT, TYPE=C3D8, ELSET=Pwire
     22,     44,     45,     47,     43,     28,     29,     31,     27
     23,     45,     46,     48,     47,     29,     30,     32,     31
*ELEMENT, TYPE=C3D8, ELSET=Pwire_coh
     24,     46,     37,     38,     48,     30,     21,     22,     32
*ELEMENT, TYPE=C3D8, ELSET=Pwire
     25,     43,     47,     41,     42,     27,     31,     25,     26
     26,     47,     48,     40,     41,     31,     32,     24,     25
*ELEMENT, TYPE=C3D8, ELSET=Pwire_coh
     27,     48,     38,     39,     40,     32,     22,     23,     24
*ELEMENT, TYPE=C3D8, ELSET=Pwire
     28,     49,     50,     61,     60,     33,     34,     45,     44
     29,     50,     51,     62,     61,     34,     35,     46,     45
*ELEMENT, TYPE=C3D8, ELSET=Pwire_coh
     30,     51,     52,     53,     62,     35,     36,     37,     46
*ELEMENT, TYPE=C3D8, ELSET=Pwire
     31,     60,     61,     63,     59,     44,     45,     47,     43
     32,     61,     62,     64,     63,     45,     46,     48,     47
*ELEMENT, TYPE=C3D8, ELSET=Pwire_coh
     33,     62,     53,     54,     64,     46,     37,     38,     48
*ELEMENT, TYPE=C3D8, ELSET=Pwire
     34,     59,     63,     57,     58,     43,     47,     41,     42
     35,     63,     64,     56,     57,     47,     48,     40,     41
*ELEMENT, TYPE=C3D8, ELSET=Pwire_coh
     36,     64,     54,     55,     56,     48,     38,     39,     40
*ELEMENT, TYPE=C3D8, ELSET=Pwire
     37,     65,     66,     77,     76,     49,     50,     61,     60
     38,     66,     67,     78,     77,     50,     51,     62,     61
*ELEMENT, TYPE=C3D8, ELSET=Pwire_coh
     39,     67,     68,     69,     78,     51,     52,     53,     62
*ELEMENT, TYPE=C3D8, ELSET=Pwire
     40,     76,     77,     79,     75,     60,     61,     63,     59
     41,     77,     78,     80,     79,     61,     62,     64,     63
*ELEMENT, TYPE=C3D8, ELSET=Pwire_coh
     42,     78,     69,     70,     80,     62,     53,     54,     64
*ELEMENT, TYPE=C3D8, ELSET=Pwire
     43,     75,     79,     73,     74,     59,     63,     57,     58
     44,     79,     80,     72,     73,     63,     64,     56,     57
*ELEMENT, TYPE=C3D8, ELSET=Pwire_coh
     45,     80,     70,     71,     72,     64,     54,     55,     56
*ELEMENT, TYPE=C3D8, ELSET=Pwire
     46,     81,     82,     93,     92,     65,     66,     77,     76
     47,     82,     83,     94,     93,     66,     67,     78,     77
*ELEMENT, TYPE=C3D8, ELSET=Pwire_coh
     48,     83,     84,     85,     94,     67,     68,     69,     78
*ELEMENT, TYPE=C3D8, ELSET=Pwire
     49,     92,     93,     95,     91,     76,     77,     79,     75
     50,     93,     94,     96,     95,     77,     78,     80,     79
*ELEMENT, TYPE=C3D8, ELSET=Pwire_coh
     51,     94,     85,     86,     96,     78,     69,     70,     80
*ELEMENT, TYPE=C3D8, ELSET=Pwire
     52,     91,     95,     89,     90,     75,     79,     73,     74
     53,     95,     96,     88,     89,     79,     80,     72,     73
*ELEMENT, TYPE=C3D8, ELSET=Pwire_coh
     54,     96,     86,     87,     88,     80,     70,     71,     72
*ELEMENT, TYPE=C3D8, ELSET=Pwire
     55,     97,     98,    109,    108,     81,     82,     93,     92
     56,     98,     99,    110,    109,     82,     83,     94,     93
*ELEMENT, TYPE=C3D8, ELSET=Pwire_coh
     57,     99,    100,    101,    110,     83,     84,     85,     94
*ELEMENT, TYPE=C3D8, ELSET=Pwire
     58,    108,    109,    111,    107,     92,     93,     95,     91
     59,    109,    110,    112,    111,     93,     94,     96,     95
*ELEMENT, TYPE=C3D8, ELSET=Pwire_coh
     60,    110,    101,    102,    112,     94,     85,     86,     96
*ELEMENT, TYPE=C3D8, ELSET=Pwire
     61,    107,    111,    105,    106,     91,     95,     89,     90
     62,    111,    112,    104,    105,     95,     96,     88,     89
*ELEMENT, TYPE=C3D8, ELSET=Pwire_coh
     63,    112,    102,    103,    104,     96,     86,     87,     88
*ELEMENT, TYPE=C3D8, ELSET=Pwire
     64,    113,    114,    125,    124,     97,     98,    109,    108
     65,    114,    115,    126,    125,     98,     99,    110,    109
*ELEMENT, TYPE=C3D8, ELSET=Pwire_coh
     66,    115,    116,    117,    126,     99,    100,    101,    110
*ELEMENT, TYPE=C3D8, ELSET=Pwire
     67,    124,    125,    127,    123,    108,    109,    111,    107
     68,    125,    126,    128,    127,    109,    110,    112,    111
*ELEMENT, TYPE=C3D8, ELSET=Pwire_coh
     69,    126,    117,    118,    128,    110,    101,    102,    112
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** Femap Group 1 : zmax
*NSET, NSET=Gzmax
321,322,323,324,325,326,327,328,329,330
331,332,333,334,335,336,921,922,923,924
1005,1006,1007,1008,1029,1030,1031,1032
** Femap Group 2 : zmin
*NSET, NSET=Gzmin
1,2,3,4,5,6,7,8,9,10
11,12,13,14,15,16
** Femap Group 3 : xmin
*NSET, NSET=Gxmin
1,2,3,4,17,18,19,20,33,34
35,36,49,50,51,52,65,66,67,68
81,82,83,84,97,98,99,100,113,114
115,116,129,130,131,132,145,146,147,148
161,162,163,164,177,178,179,180,193,194
195,196,209,210,211,212,225,226,227,228
241,242,243,244,257,258,259,260,273,274
275,276,289,290,291,292,305,306,307,308
321,322,323,324,505,509,513,517,521,525
529,533,537,541,545,549,553,557,561,565
569,573,577,581,585,589,593,597,601,605
609,613,617,621,625,629,633,637,641,645
649,653,657,661,665,669,673,677,681,685
689,693,697,701,705,709,713,717,721,725
729,733,737,741,745,749,753
** Femap Group 4 : ymin
*NSET, NSET=Gymin
1,10,11,12,17,26,27,28,33,42
43,44,49,58,59,60,65,74,75,76
81,90,91,92,97,106,107,108,113,122
123,124,129,138,139,140,145,154,155,156
161,170,171,172,177,186,187,188,193,202
203,204,209,218,219,220,225,234,235,236
241,250,251,252,257,266,267,268,273,282
283,284,289,298,299,300,305,314,315,316
321,330,331,332
*ELSET, ELSET=OUT_CONT, GENERATE
10,189,1
550,669,1
** Femap Property 1 : wire
*ORIENTATION, NAME=S0, DEFINITION=COORDINATES, SYSTEM=RECTANGULAR
        1.,        0.,        0.,        0.,        1.,        0.
*SOLID SECTION, ELSET=Pwire, MATERIAL=Ma, ORIENTATION=S0
** Femap Property 2 : cover
*SOLID SECTION, ELSET=Pcover, MATERIAL=Ma, ORIENTATION=S0
** Femap Property 3 : wire_coh
*SOLID SECTION, ELSET=Pwire_coh, MATERIAL=Ma, ORIENTATION=S0
** Femap Property 4 : cover_coh
*SOLID SECTION, ELSET=Pcover_coh, MATERIAL=Ma, ORIENTATION=S0
** Femap Material 1 : a
*MATERIAL, NAME=Ma
*ELASTIC, TYPE=ISOTROPIC
        0.,        0.,        0.
** Load Step 1 -------------------------------------------------------
*STEP, INC=100
³è
*STATIC

*NODE PRINT, FREQUENCY=1
    U,
*FILE FORMAT, ASCII
*NODE FILE, FREQUENCY=1
    U,
*NODE FILE, FREQUENCY=1
   CF,
*NODE FILE, FREQUENCY=1
   RF,
*EL PRINT, ELSET=OUT_CONT,FREQUENCY=1, POSITION=CENTROIDAL
    S,
 SINV,
*EL PRINT, ELSET=OUT_CONT,FREQUENCY=1,	POSITION=NODES
    S,
 SINV,
*EL FILE, ELSET=OUT_CONT,FREQUENCY=1, POSITION=CENTROIDAL
    S,
 SINV,
*EL FILE, ELSET=OUT_CONT,FREQUENCY=1,	POSITION=NODES
    S,
 SINV,
*EL PRINT, ELSET=OUT_CONT,FREQUENCY=1, POSITION=CENTROIDAL
*EL PRINT, ELSET=OUT_CONT,FREQUENCY=1,	POSITION=NODES
*EL FILE, ELSET=OUT_CONT,FREQUENCY=1, POSITION=CENTROIDAL
*EL FILE, ELSET=OUT_CONT,FREQUENCY=1,	POSITION=NODES
*END STEP
